<?xml version="1.0"?>


<!--For N2501    Bristol Hercules 739 and 759-->
<piston_engine name="Bristol Hercules">
    <injected>1</injected>
    <minmp unit="INHG">          6.0 </minmp>
    <maxmp unit="INHG">         38.0 </maxmp>
    <displacement unit="IN3"> 1868.00 </displacement>
    <maxhp>        2040.00 </maxhp>
    <cycles>         2.0 </cycles>
    <idlerpm>      600.0 </idlerpm>
    <maxthrottle>    1.0 </maxthrottle>
    <minthrottle>    0.05</minthrottle>
  </piston_engine>
